Fri May  3 20:37:40 UTC 2019
$PROB RUN# 101

$INPUT C ID TIME EVID AMT CMT SS II ADDL DV

$DATA ../1001.csv IGNORE=C

$SUBROUTINES ADVAN2 TRANS2

$PK

TVCL=THETA(1)
CL=TVCL*EXP(ETA(1))

TVV2=THETA(2)
V=TVV2*EXP(ETA(2))

TVKA=THETA(3)
KA=TVKA*EXP(ETA(3))

S2 = V

$ERROR
IPRED=F

CP = A(2)/V

Y=IPRED*EXP(ERR(1))

$THETA
(1.1,   FIX) ;; CL
(20,  FIX) ;; V
(1.5, FIX) ;; KA

$OMEGA
0.0 FIX
0.0 FIX
0.0 FIX

$SIGMA
0.00 FIX

$TABLE FILE=TAB ID TIME IPRED CP DV PRED NOPRINT ONEHEADER NOAPPEND

$SIMULATION (2674474) ONLYSIMULATION

NM-TRAN MESSAGES
 WARNINGS AND ERRORS (IF ANY) FOR PROBLEM    1
 (WARNING  2) NM-TRAN INFERS THAT THE DATA ARE POPULATION.
 (DATA WARNING   2) RECORD         1, DATA ITEM  10, CONTENTS:
 THE NUMBER OF DATA ITEMS SPECIFIED IN $INPUT EXCEEDS THE NUMBER OF VALUES
 IN A RECORD OF THE NM-TRAN DATA FILE. NULLS WERE SUPPLIED FOR MISSING
 VALUES, STARTING WITH THE ABOVE NUMBERED DATA ITEM.
 (DATA WARNING   2) RECORD         2, DATA ITEM  10, CONTENTS:
 THE NUMBER OF DATA ITEMS SPECIFIED IN $INPUT EXCEEDS THE NUMBER OF VALUES
 IN A RECORD OF THE NM-TRAN DATA FILE. NULLS WERE SUPPLIED FOR MISSING
 VALUES, STARTING WITH THE ABOVE NUMBERED DATA ITEM.
 * THE MAXIMUM NUMBER OF WARNINGS OF ONE OR MORE TYPES WAS REACHED.
 IT IS POSSIBLE THAT SOME WARNING MESSAGES WERE SUPPRESSED.
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
1NONLINEAR MIXED EFFECTS MODEL PROGRAM (NONMEM) VERSION 7.4.3
 ORIGINALLY DEVELOPED BY STUART BEAL, LEWIS SHEINER, AND ALISON BOECKMANN
 CURRENT DEVELOPERS ARE ROBERT BAUER, ICON DEVELOPMENT SOLUTIONS,
 AND ALISON BOECKMANN. IMPLEMENTATION, EFFICIENCY, AND STANDARDIZATION
 PERFORMED BY NOUS INFOSYSTEMS.
 PROBLEM NO.:         1
 RUN# 101
 TOT. NO. OF OBS RECS:       49
 TOT. NO. OF INDIVIDUALS:        1
 ONE COMPARTMENT MODEL WITH FIRST-ORDER ABSORPTION (ADVAN2)
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 SIMULATION STEP PERFORMED
 Elapsed simulation  time in seconds:     0.00
 Elapsed finaloutput time in seconds:     0.00
 #CPUT: Total CPU Time in Seconds,        0.017
