Thu May 19 10:57:23 EDT 2022
;$PARAM TVKG =0.6, TVKS0=0.4, TVGAMMA=0.8, TVBASE =70, DOSE=10
;
;$OMEGA 0.005 0.03 0.003 0.01
;
;$CMT RESP
;
;$MAIN
;double KG = TVKG * exp(ETA(1));
;double KS0 = TVKS0 * exp(ETA(2));
;double GAMMA = TVGAMMA * exp(ETA(3));
;double BASE = TVBASE*exp(ETA(4));
;RESP_0 = BASE;
;$ODE
;double KS = KS0 *exp( -GAMMA * SOLVERTIME);
;dxdt_RESP = KG * RESP - KS*log(DOSE)*RESP;
;$CAPTURE
;RESP_0 BASE KS KS0 KG GAMMA ETA(4)
$PROBLEM    RUN# c001
$INPUT      C ID TIME DOSE CMT EVID MDV DV
$DATA      claret001.csv IGNORE=C
$SUBROUTINE ADVAN13 TOL=8
$MODEL      NCOMP=1
$PK
KG = 0.6;
KS0 = 0.4;
GAMMA=0.8;
BASE=70;
A_0(1) = BASE;

$DES
KS = KS0 *EXP( -GAMMA * T);
DADT(1) = KG * A(1) - KS*LOG(DOSE)*A(1)

$ERROR
IPRED=A(1);
Y=IPRED+ERR(1);

$THETA  0 FIX
$OMEGA  0.0  FIX
 0.0  FIX
 0.0  FIX
$SIGMA  0.00  FIX
$TABLE      FILE=TAB ID TIME Y NOPRINT ONEHEADER NOAPPEND
$SIMULATION (2674474) ONLYSIMULATION

NM-TRAN MESSAGES
 WARNINGS AND ERRORS (IF ANY) FOR PROBLEM    1
 (WARNING  2) NM-TRAN INFERS THAT THE DATA ARE POPULATION.
 (WARNING  46) ETA VARIABLES ARE NOT USED, BUT DATA ARE POPULATION TYPE.

1NONLINEAR MIXED EFFECTS MODEL PROGRAM (NONMEM) VERSION 7.5.0
 ORIGINALLY DEVELOPED BY STUART BEAL, LEWIS SHEINER, AND ALISON BOECKMANN
 CURRENT DEVELOPERS ARE ROBERT BAUER, ICON DEVELOPMENT SOLUTIONS,
 AND ALISON BOECKMANN. IMPLEMENTATION, EFFICIENCY, AND STANDARDIZATION
 PERFORMED BY NOUS INFOSYSTEMS.
 PROBLEM NO.:         1
 RUN# c001
 TOT. NO. OF OBS RECS:        0
 TOT. NO. OF INDIVIDUALS:        1
 GENERAL NONLINEAR KINETICS MODEL WITH STIFF/NONSTIFF EQUATIONS (LSODA, ADVAN13)
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 SIMULATION STEP PERFORMED
 Elapsed simulation  time in seconds:     0.00
 Elapsed finaloutput time in seconds:     0.00
 #CPUT: Total CPU Time in Seconds,        0.006
