$PROB RUN# 101

$INPUT C ID TIME EVID AMT CMT SS II ADDL DV

$DATA ../1001.csv IGNORE=C

$SUBROUTINES ADVAN2 TRANS2

$PK

TVCL=THETA(1)
CL=TVCL*EXP(ETA(1))

TVV2=THETA(2)
V=TVV2*EXP(ETA(2))

TVKA=THETA(3)
KA=TVKA*EXP(ETA(3))

S2 = V

$ERROR
IPRED=F

CP = A(2)/V

Y=IPRED*EXP(ERR(1))


$THETA
(1.1,   FIX) ;; CL
(20,  FIX) ;; V
(1.5, FIX) ;; KA

$OMEGA
0.0 FIX
0.0 FIX
0.0 FIX

$SIGMA
0.00 FIX

$TABLE FILE=TAB ID TIME IPRED CP DV PRED NOPRINT ONEHEADER NOAPPEND

$SIMULATION (2674474) ONLYSIMULATION
