Sat Jun 23 15:30:12 UTC 2018
ifort (IFORT) 12.0.4 20110427
Copyright (C) 1985-2011 Intel Corporation.  All rights reserved.

$PROB RUN# 104

$INPUT C ID TIME EVID AMT CMT WT DOSE DV

$DATA ../../data/104.csv IGNORE=C

$SUBROUTINES ADVAN2 TRANS2

$PK

TVCL=THETA(1)*(WT/70)**0.75
CL=TVCL*EXP(ETA(1))

TVV2=THETA(2)*(WT/70)
V=TVV2*EXP(ETA(2))

TVKA=THETA(3)
KA=TVKA*EXP(ETA(3))

$ERROR
IPRED=A(2)/(V/1000)
Y=IPRED*EXP(ERR(1))

CP = IPRED

REPI = IREP

$THETA
(1,   FIX) ;; CL
(20,  FIX) ;; V
(1.5, FIX) ;; KA

$OMEGA
0.09 FIX
0.1 FIX
0.2 FIX

$SIGMA
0.025 FIX

$TABLE FILE=TAB REPI ID TIME EVID CP IPRED PRED DV DOSE NOPRINT NOHEADER NOAPPEND

$SIMULATION (2674474) SUBPROBLEM = 1000 ONLYSIMULATION

NM-TRAN MESSAGES
 WARNINGS AND ERRORS (IF ANY) FOR PROBLEM    1
 (WARNING  2) NM-TRAN INFERS THAT THE DATA ARE POPULATION.

1NONLINEAR MIXED EFFECTS MODEL PROGRAM (NONMEM) VERSION 7.3.0
 ORIGINALLY DEVELOPED BY STUART BEAL, LEWIS SHEINER, AND ALISON BOECKMANN
 CURRENT DEVELOPERS ARE ROBERT BAUER, ICON DEVELOPMENT SOLUTIONS,
 AND ALISON BOECKMANN. IMPLEMENTATION, EFFICIENCY, AND STANDARDIZATION
 PERFORMED BY NOUS INFOSYSTEMS.
 PROBLEM NO.:         1
 RUN# 104
 TOT. NO. OF OBS RECS:      540
 TOT. NO. OF INDIVIDUALS:     60
 ONE COMPARTMENT MODEL WITH FIRST-ORDER ABSORPTION (ADVAN2)
 PROBLEM NO.:         1     SUBPROBLEM NO.:      1
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 SIMULATION STEP PERFORMED
 PROBLEM NO.:         1     SUBPROBLEM NO.:      2
 SIMULATION STEP PERFORMED
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 #CPUT: Total CPU Time in Seconds,       49.778
