Wed Mar 30 10:08:14 EDT 2022
$PROBLEM    RUN 2001 ; see time-varying-vignette.R
$INPUT      C ID TIME WT EVID AMT CMT SS II ADDL RATE LAGT MODE DUR2
            RAT2 BIOAV DV
$DATA      2001.csv IGNORE=C
$SUBROUTINE ADVAN2 TRANS2
$PK

TVCL=THETA(1)*(WT/70)**0.75
CL=TVCL*EXP(ETA(1))

TVV2=THETA(2)
V=TVV2*EXP(ETA(2))

TVKA=THETA(3)
KA=TVKA*EXP(ETA(3))

$ERROR
IPRED=A(2)/(V/1000)
Y=IPRED*EXP(ERR(1))

CP = IPRED

$THETA  1.1 FIX ; ; CL
 20 FIX ; _; V
 1.5 FIX ; __; KA
$OMEGA  0.0  FIX
 0.0  FIX
 0.0  FIX
$SIGMA  0.00  FIX
$TABLE      FILE=TAB ID TIME WT CL CP NOPRINT ONEHEADER NOAPPEND
$SIMULATION (2674474) ONLYSIMULATION

NM-TRAN MESSAGES
 WARNINGS AND ERRORS (IF ANY) FOR PROBLEM    1
 (WARNING  2) NM-TRAN INFERS THAT THE DATA ARE POPULATION.
 (DATA WARNING   5) RECORD         1, DATA ITEM  17, CONTENTS: 1.1
 THE DV DATA ITEM IS POSITIVE, BUT THE MDV DATA ITEM IS 1

1NONLINEAR MIXED EFFECTS MODEL PROGRAM (NONMEM) VERSION 7.5.0
 ORIGINALLY DEVELOPED BY STUART BEAL, LEWIS SHEINER, AND ALISON BOECKMANN
 CURRENT DEVELOPERS ARE ROBERT BAUER, ICON DEVELOPMENT SOLUTIONS,
 AND ALISON BOECKMANN. IMPLEMENTATION, EFFICIENCY, AND STANDARDIZATION
 PERFORMED BY NOUS INFOSYSTEMS.
 PROBLEM NO.:         1
 RUN 2001 ; see time-varying-vignette.R
 TOT. NO. OF OBS RECS:       33
 TOT. NO. OF INDIVIDUALS:        1
 ONE COMPARTMENT MODEL WITH FIRST-ORDER ABSORPTION (ADVAN2)
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 SIMULATION STEP PERFORMED
 Elapsed simulation  time in seconds:     0.00
 Elapsed finaloutput time in seconds:     0.00
 #CPUT: Total CPU Time in Seconds,        0.010
